# GayBerne ellipsoids in LJ background fluid

units	     lj
atom_style   ellipsoid
dimension    2

##########################
# In the future (after you have created your "system.data" file)
# you can replace the next 4 commands with: "read_data system.data"
lattice	     sq 0.02
region	     box block 0 10 0 10 0 10
create_box   2 box
create_atoms 1 box
##########################

set	     group all type/fraction 2 0.1 95392
set 	     type 1 mass 1.0
set 	     type 2 mass 1.5
set 	     type 1 shape 1 1 1
set 	     type 2 shape 3 1 1
set	     group all quat/random 18238

compute	     rot all temp/asphere
group	     spheroid type 1
variable     dof equal count(spheroid)+2
compute_modify rot extra ${dof}

velocity     all create 2.4 87287 loop geom

pair_style   gayberne 1.0 3.0 1.0 4.0
pair_coeff   1 1 3.0 1.0 1 1 1 1 1 1 2.5
pair_coeff   1 2 3.0 1.0 1 1 1 0 0 0
pair_coeff   2 2 1.0 1.0 1 1 0.2 0 0 0

neighbor     0.8 bin

thermo_style custom step c_rot epair pe ke  etotal press vol density
thermo	     100

timestep     0.002


##############################
# COMMENTING OUT
#compute	     q all property/atom quatw quati quatj quatk
#
#dump	     1 all custom 100 dump.ellipse.gayberne &
#	     id type x y z c_q[1] c_q[2] c_q[3] c_q[4]
# REPLACING WITH
#http://www.ovito.org/manual/howto.aspherical_particles.html

compute orient all property/atom quati quatj quatk quatw
compute shape all property/atom shapex shapey shapez
dump 1 all custom 100 ellipsoid.lammpstrj id type x y z &
    c_orient[1] c_orient[2] c_orient[3] c_orient[4] &
    c_shape[1] c_shape[2] c_shape[3]
##############################


#dump	     2 all image 100 image.*.jpg type type &
#	     zoom 1.6 center d 0.5 0.5 0.5
#dump_modify  2 pad 4 adiam 1 1.0 adiam 2 2.0

#dump	     3 all movie 100 movie.mpg type type &
#	     zoom 1.6 center d 0.5 0.5 0.5
#dump_modify  3 pad 4 adiam 1 1.0 adiam 2 2.0

fix	     1 all npt/asphere temp 2.0 2.0 0.1 iso 0.0 1.0 1.0 &
	       mtk no pchain 0 tchain 1
fix	     2 all enforce2d

compute_modify 1_temp extra ${dof}

# equilibrate to shrink box around dilute system

# ADDED A "write_data" COMMAND:
# (Later you can use "read_data.data")

write_data system.data nocoeff

#   Note: In the line above, "nocoeff" is optional.  I use it because I prefer to
#         leave the force-field settings out of the data file.  For details, see:
#   http://lammps.sandia.gov/doc/write_data.html

run	     2000

# run dynamics on dense system

unfix	     1
fix	     1 all nve/asphere

run	     2000

write_data puregb.data
